// SBML level 2 version 3

model NetLand_SBML_model()

  // Compartments:
  compartment cytosol = 1;
  compartment compartment = 1;

  // Species:
  substanceOnly species PTEN in cytosol = 1;
  substanceOnly species Mdm2 in cytosol = 1;
  substanceOnly species Wip1 in cytosol = 1;
  substanceOnly species CycD in cytosol = 1;
  substanceOnly species CycE in cytosol = 1;
  substanceOnly species ATM in cytosol = 1;
  substanceOnly species P53 in cytosol = 1;
  substanceOnly species P21 in cytosol = 1;
  substanceOnly species AKT in cytosol = 1;
  substanceOnly species Myc in cytosol = 1;
  substanceOnly species ARF in cytosol = 1;
  substanceOnly species E2F in cytosol = 1;
  substanceOnly species RB in cytosol = 1;

  // Parameters:
  BasalExpression_CycD_1 = 0;
  BasalExpression_CycD_0 = 0;
  BasalExpression_Mdm2_1 = 0;
  BasalExpression_Mdm2_2 = 0;
  BasalExpression_Mdm2_0 = 0;
  BasalExpression_Mdm2_3 = 0;
  BasalExpression_PTEN_0 = 0;
  BasalExpression_Wip1_0 = 0;
  BasalExpression_CycE_0 = 0;
  BasalExpression_CycE_1 = 0;
  BasalExpression_P21_1 = 0;
  BasalExpression_P21_0 = 0;
  BasalExpression_P53_0 = 0;
  BasalExpression_P53_2 = 0;
  BasalExpression_P53_1 = 0;
  BasalExpression_P53_4 = 0;
  BasalExpression_P53_3 = 0;
  BasalExpression_ARF_0 = 0;
  BasalExpression_ATM_0 = 0;
  BasalExpression_ATM_1 = 0;
  BasalExpression_AKT_0 = 0;
  BasalExpression_E2F_3 = 0;
  BasalExpression_E2F_2 = 0;
  BasalExpression_E2F_1 = 0;
  BasalExpression_E2F_0 = 0;
  BasalExpression_CycD = 0;
  BasalExpression_RB_0 = 0;
  BasalExpression_RB_2 = 0;
  BasalExpression_RB_1 = 0;
  BasalExpression_Wip1 = 0;
  BasalExpression_Mdm2 = 0;
  BasalExpression_CycE = 0;
  BasalExpression_PTEN = 0;
  BasalExpression_Myc = 0;
  BasalExpression_E2F = 0;
  BasalExpression_P53 = 0;
  BasalExpression_ARF = 0;
  BasalExpression_AKT = 0;
  BasalExpression_ATM = 0;
  BasalExpression_P21 = 0;
  BasalExpression_RB = 0;
  N_Mdm2_1 = 4;
  N_Mdm2_0 = 4;
  I_CycE_1 = 1;
  deg_Mdm2 = 1;
  I_Mdm2_1 = 1;
  N_Mdm2_2 = 4;
  N_Mdm2_3 = 4;
  I_Mdm2_2 = 1;
  I_Mdm2_3 = 1;
  max_Wip1 = 1;
  I_Mdm2_0 = 1;
  max_Mdm2 = 1;
  I_CycD_0 = 1;
  I_CycD_1 = 1;
  N_PTEN_0 = 4;
  I_CycE_0 = 1;
  K_CycD_1 = 0.5;
  K_CycD_0 = 0.5;
  K_Mdm2_3 = 0.5;
  K_Mdm2_2 = 0.5;
  K_Mdm2_1 = 0.5;
  K_Mdm2_0 = 0.5;
  I_PTEN_0 = 1;
  max_CycD = 1;
  max_CycE = 1;
  max_PTEN = 1;
  deg_Wip1 = 1;
  deg_PTEN = 1;
  K_Wip1_0 = 0.5;
  N_Wip1_0 = 4;
  I_Wip1_0 = 1;
  K_PTEN_0 = 0.5;
  deg_CycE = 1;
  deg_CycD = 1;
  N_CycE_0 = 4;
  N_CycE_1 = 4;
  N_CycD_1 = 4;
  N_CycD_0 = 4;
  K_CycE_1 = 0.5;
  K_CycE_0 = 0.5;
  K_P53_2 = 0.5;
  I_P53_0 = 1;
  K_P53_1 = 0.5;
  I_P53_2 = 1;
  K_P53_4 = 0.5;
  I_P53_1 = 1;
  K_P53_3 = 0.5;
  I_P53_4 = 1;
  I_P53_3 = 1;
  N_ATM_1 = 4;
  K_P53_0 = 0.5;
  N_ATM_0 = 4;
  max_E2F = 1;
  deg_AKT = 1;
  deg_P21 = 1;
  I_ATM_0 = 1;
  I_ATM_1 = 1;
  K_AKT_0 = 0.5;
  I_P21_0 = 1;
  I_P21_1 = 1;
  I_ARF_0 = 1;
  max_AKT = 1;
  max_P21 = 1;
  N_ARF_0 = 4;
  max_ATM = 1;
  I_AKT_0 = 1;
  K_ARF_0 = 0.5;
  deg_ATM = 1;
  N_P21_0 = 4;
  N_AKT_0 = 4;
  N_P21_1 = 4;
  I_E2F_0 = 1;
  I_E2F_1 = 1;
  I_E2F_2 = 1;
  I_E2F_3 = 1;
  deg_Myc = 1;
  K_ATM_1 = 0.5;
  max_ARF = 1;
  K_E2F_3 = 0.5;
  K_E2F_2 = 0.5;
  K_P21_1 = 0.5;
  K_P21_0 = 0.5;
  K_E2F_1 = 0.5;
  deg_E2F = 1;
  K_E2F_0 = 0.5;
  K_ATM_0 = 0.5;
  max_Myc = 1;
  N_E2F_2 = 4;
  N_E2F_1 = 4;
  N_E2F_0 = 4;
  deg_ARF = 1;
  deg_P53 = 1;
  N_E2F_3 = 4;
  max_P53 = 1;
  N_P53_1 = 4;
  N_P53_0 = 4;
  N_P53_2 = 4;
  N_P53_3 = 4;
  N_P53_4 = 4;
  I_RB_2 = 1;
  I_RB_1 = 1;
  I_RB_0 = 1;
  deg_RB = 1;
  stress = 0.3;
  N_RB_2 = 4;
  N_RB_1 = 4;
  N_RB_0 = 4;
  K_RB_2 = 0.5;
  K_RB_1 = 0.5;
  K_RB_0 = 0.5;
  max_RB = 1;
  GS = 0.2;
  S = 0.5;
  b = 0.05;
  a = 1.5;
  n = 4;
  k = 1;

  // Reactions:
  PTEN_synthesis: P53 + PTEN -> PTEN; a*P53^n/(S^n + P53^n) - k*PTEN; PTEN_synthesis is "a*P53^n/(S^n+P53^n)-k*PTEN";
  Mdm2_synthesis: ATM + ARF + P53 + AKT + Wip1 + Mdm2 -> Mdm2; b*S^n/(S^n + ATM^n) + b*S^n/(S^n + ARF^n) + a*P53^n/(S^n + P53^n) + a*AKT^n/(S^n + AKT^n) + a*Wip1^n/(S^n + Wip1^n) - k*Mdm2; Mdm2_synthesis is "b*S^n/(S^n+ATM^n)+b*S^n/(S^n+ARF^n)+a*P53^n/(S^n+P53^n)+a*AKT^n/(S^n+AKT^n)+a*Wip1^n/(S^n+Wip1^n)-k*Mdm2";
  Wip1_synthesis: P53 + Wip1 -> Wip1; a*P53^n/(S^n + P53^n) - k*Wip1; Wip1_synthesis is "a*P53^n/(S^n+P53^n)-k*Wip1";
  CycD_synthesis: Myc + P21 + CycD -> CycD; a*Myc^n/(S^n + Myc^n) + a*GS^n/(S^n + GS^n) + b*S^n/(S^n + P21^n) - k*CycD; CycD_synthesis is "a*Myc^n/(S^n+Myc^n)+a*GS^n/(S^n+GS^n)+b*S^n/(S^n+P21^n)-k*CycD";
  CycE_synthesis: E2F + P21 + CycE -> CycE; a*E2F^n/(S^n + E2F^n) + b*S^n/(S^n + P21^n) - k*CycE; CycE_synthesis is "a*E2F^n/(S^n+E2F^n)+b*S^n/(S^n+P21^n)-k*CycE";
  ATM_synthesis: ATM + Wip1 -> ATM; a*ATM^n/(S^n + ATM^n) + a*stress^n/(S^n + stress^n) + b*S^n/(S^n + Wip1^n) - k*ATM; ATM_synthesis is "a*ATM^n/(S^n+ATM^n)+a*stress^n/(S^n+stress^n)+b*S^n/(S^n+Wip1^n)-k*ATM";
  P53_synthesis: ARF + P53 + Mdm2 + Wip1 + ATM -> P53; a*ARF^n/(S^n + ARF^n) + a*P53^n/(S^n + P53^n) + b*S^n/(S^n + Mdm2^n) + b*S^n/(S^n + Wip1^n) + a*ATM^n/(S^n + ATM^n) - k*P53; P53_synthesis is "a*ARF^n/(S^n+ARF^n)+a*P53^n/(S^n+P53^n)+b*S^n/(S^n+Mdm2^n)+b*S^n/(S^n+Wip1^n)+a*ATM^n/(S^n+ATM^n)-k*P53";
  P21_synthesis: P53 + AKT + P21 -> P21; a*P53^n/(S^n + P53^n) + b*S^n/(S^n + AKT^n) - k*P21; P21_synthesis is "a*P53^n/(S^n+P53^n)+b*S^n/(S^n+AKT^n)-k*P21";
  AKT_synthesis: PTEN + AKT -> AKT; b*S^n/(S^n + PTEN^n) - k*AKT; AKT_synthesis is "b*S^n/(S^n+PTEN^n)-k*AKT";
  Myc_synthesis: Myc -> Myc; a*GS^n/(S^n + GS^n) - k*Myc; Myc_synthesis is "a*GS^n/(S^n+GS^n)-k*Myc";
  ARF_synthesis: Myc + ARF -> ARF; a*Myc^n/(S^n + Myc^n) - k*ARF; ARF_synthesis is "a*Myc^n/(S^n+Myc^n)-k*ARF";
  E2F_synthesis: P21 + E2F + RB + Myc -> E2F; b*S^n/(S^n + P21^n) + a*E2F^n/(S^n + E2F^n) + b*S^n/(S^n + RB^n) + a*Myc^n/(S^n + Myc^n) - k*E2F; E2F_synthesis is "b*S^n/(S^n+P21^n)+a*E2F^n/(S^n+E2F^n)+b*S^n/(S^n+RB^n)+a*Myc^n/(S^n+Myc^n)-k*E2F";
  RB_synthesis: P21 + CycD + CycE + RB -> RB; a*P21^n/(S^n + P21^n) + b*S^n/(S^n + CycD^n) + b*S^n/(S^n + CycE^n) - k*RB; RB_synthesis is "a*P21^n/(S^n+P21^n)+b*S^n/(S^n+CycD^n)+b*S^n/(S^n+CycE^n)-k*RB";
end
